# ========== Shear Modulus Simulation ==========
# Starting from isolated swollen gel configuration (snug box, no piston/support/walls)
# Variables from bash script: dataname, interaction, epsSS, epsSP, nsteps
#
# Atom types: 1=polymer, 2=crosslinker, 3=solvent (if swollen gel)
#
# Reduced LJ units: tau = sigma*sqrt(m/epsilon)
# dt = 0.005 → 1e6 steps ≈ 4.1e3 tau
#
# Simple shear in the xz plane via gradient fix move variable (rheometer-style):
#   - Top 30% of gel polymer: v(z) = +vshear × (z−z_inner)/grad_thick
#     (0 at inner boundary → +vshear at gel top surface)
#   - Bottom 30% of gel polymer: mirror profile, reaching −vshear at bottom surface
#   - Interior 40% of gel + all solvent: NVT thermostat (free motion)
#   - Box stays ORTHOGONAL throughout (xz = 0).
#   - G = ⟨σ_p_xz⟩ / gel_strain_cm_final  (Phase 3 time-averaged polymer stress)
#
# Why gradient fix move (not hard fix move):
#   Hard fix move (previous approach — FAILED): v_driven = vshear, v_interior = 0.
#   One bond straddles the driven/interior boundary with full vshear discontinuity
#   → stretches monotonically → FENE failure.  Tried: shear_frac=0.05, 30% slower
#   vshear, backbone-only driven groups → warnings pushed 92k→149k steps, never cured.
#   Gradient fix move: each bond within the gradient zone sees only
#   Δv ≈ vshear × bond_Δz / grad_thick ≈ 0.25×vshear per bond.  The NVT interior
#   atom at the innermost boundary sees ≈ 0.08×vshear discontinuity — safe.
#
# fix move variable argument order: x y z vx vy vz  (not vx vy vz ax ay az).
#   The velocity variable goes in position 4 (vx), NOT position 1 (x).
#   Previous run had this backwards → x-position was prescribed instead of velocity
#   → gel_strain_cm ≈ 0.  Fixed: NULL NULL NULL v_vx_top_grad NULL NULL.
#
# Why NOT change_box (also FAILED for this system):
#   Gel surrounded by thin solvent film: instantaneous box tilt pushes the solvent,
#   gel merely translates sideways rather than shearing internally.
#
# Phases:
#   1. Brief NPT equilibration (undeformed, isotropic)
#   2. Gradient fix move shear — top/bot 30% driven, interior NVT
#   3. NVT production with gradient zone frozen → time-averaged stresses → G
#
# Outputs (all in the timestamped lammps_runs/ working directory):
#   log.lammps                                    bulk pressure: pxx pyy pzz pxy pxz pyz
#   stress_data/stress_tensor_polymer_*.dat        box-integrated 6-component stress (time-avg)
#   stress_data/stress_tensor_solvent_*.dat        same for solvent
#   stress_data/stress_profile_z_polymer_*.dat     z-binned 6-component stress profile (time-avg)
#   stress_data/stress_profile_z_solvent_*.dat     same for solvent
#   stress_data/shear_strain_*.dat                 4 cols: step  gel_lz_initial  gel_thick  gel_strain_cm(polymer COM)
#   volume_data/gel_dimensions_rg_*.dat            Rg-based gel dimensions
#   volume_data/box_dimensions_*.dat               lx ly lz xy xz yz vs step
#   volume_data/polymer_com_*.dat                  polymer centre of mass vs step
#   traj_files/prod_*.lammpstrj                    sparse trajectory (for vol fraction analysis)


# ==========================================================================
#                              PARAMETERS
# ==========================================================================

# ----- Physical Parameters -----
variable sigma          equal 1.0
variable temp_target    equal 1.0
variable P_target       equal 1.5
variable timestep_prod  equal 0.005

# ----- Shear Parameters -----
# Keep target_strain_xz <= 0.10 to remain in the linear (elastic) regime
variable target_strain_xz equal 0.10

# ----- Phase Lengths -----
variable nsteps_equil  equal 50000    # Phase 1: NPT equilibration steps
variable nsteps_shear  equal 285000   # Phase 2: gradient fix move shear steps
# nsteps (Phase 3 production) comes from bash via -var nsteps

# ----- Output Frequencies -----
variable thermo_freq     equal 10000
variable dump_freq_setup equal 10000
variable dump_freq_prod  equal 10000
variable stress_freq     equal 5000

# ----- Time Averaging (stress) -----
# Adaptive: targets num_stress_curves output frames, with bounded nrepeat
# nfreq = nevery × nrepeat  (LAMMPS constraint)
variable num_stress_curves equal 10
variable nevery_target     equal 100    # ~0.5 τ — near stress decorrelation time
variable nrepeat_max       equal 2000   # cap to preserve transient resolution
variable nrepeat_min       equal 50     # floor for adequate noise reduction

variable nfreq_raw    equal floor(${nsteps}/v_num_stress_curves)
variable nrepeat_raw  equal floor(v_nfreq_raw/v_nevery_target)

variable nr_lo equal (v_nrepeat_raw>v_nrepeat_min)*v_nrepeat_raw+(v_nrepeat_raw<=v_nrepeat_min)*v_nrepeat_min
variable nrepeat_stress equal (v_nr_lo<v_nrepeat_max)*v_nr_lo+(v_nr_lo>=v_nrepeat_max)*v_nrepeat_max
variable nevery_stress equal floor(v_nfreq_raw/v_nrepeat_stress)
variable nfreq_stress  equal v_nevery_stress*v_nrepeat_stress

print ">>> Stress averaging: nevery=${nevery_stress}  nrepeat=${nrepeat_stress}  nfreq=${nfreq_stress}"
print ">>> Shear: γ_target=${target_strain_xz}  nsteps_shear=${nsteps_shear} (gradient fix move, box stays orthogonal)"

# ----- Spatial Binning -----
variable binWidth    equal 2.0
variable rg_scale    equal 1.8    # Rg multiplier for analysis region sizing (~90% coverage)
variable region_frac equal 1


# ==========================================================================
#                           INITIALIZATION
# ==========================================================================

units lj
dimension 3
boundary p p p
atom_style molecular
atom_modify map array

# WCA (purely repulsive, rc = 2^(1/6) σ ≈ 1.122) — consistent with slab_with_flow.
pair_style lj/cut 1.122
bond_style fene

read_data data_files/${dataname}.data nocoeff

comm_modify cutoff 5.0

print "========================================"
print "Shear slab simulation: ${dataname}"
print "Interaction: epsSS=${epsSS}, epsSP=${epsSP}"
print "Production steps: ${nsteps}"
print "Target shear strain: ${target_strain_xz}"
print "Shear method: change_box instantaneous + NVT relax"
print "========================================"


# ==========================================================================
#                          GROUP DEFINITIONS
# ==========================================================================

group polymer    type 1 2
group backbone   type 1      # backbone polymer only (2 FENE bonds each — safe at driven boundary)
group crosslinks type 2      # crosslinkers (4+ FENE bonds — kept in interior_mobile always)
group solvent    type 3
group all_mobile type 1 2 3


# ==========================================================================
#                       INTERATOMIC POTENTIALS
# ==========================================================================

# WCA for all pairs by default
pair_coeff * * 1.0 ${sigma} 1.122

# Tunable polymer-solvent and solvent-solvent interactions
pair_coeff 1 3 ${epsSP} ${sigma} 1.122    # polymer-solvent
pair_coeff 2 3 ${epsSP} ${sigma} 1.122    # crosslinker-solvent
pair_coeff 3 3 ${epsSS} ${sigma} 1.122    # solvent-solvent

# FENE bonds (Kremer-Grest): K=30, R0=1.5, epsilon=1, sigma=1
bond_coeff * 30.0 1.5 1.0 1.0
special_bonds fene

neigh_modify delay 0 every 1 check yes


# ==========================================================================
#                           THERMO OUTPUT
# ==========================================================================

# Mobile temperature and pressure computed explicitly (matches slab_with_flow convention)
compute mobile_temp all_mobile temp
compute mobile_press all pressure mobile_temp pair bond

# All 6 pressure tensor components + tilt factors in thermo for bulk pressure comparison
thermo_style custom step c_mobile_temp pe ke etotal press c_mobile_press &
    pxx pyy pzz pxy pxz pyz vol lx ly lz xy xz yz
thermo_modify lost warn
thermo ${thermo_freq}


# ==========================================================================
#              PHASE 1: NPT EQUILIBRATION (Undeformed)
# ==========================================================================
# Isotropic NPT relaxes any residual pressure from the isolated-gel data file.
# Box starts orthogonal; xz tilt = 0 throughout.

print "========================================"
print "Phase 1: NPT equilibration (${nsteps_equil} steps)"
print "========================================"

reset_timestep 0
timestep ${timestep_prod}

# Convert orthogonal box → triclinic (xz=0 initially) so fix deform can tilt it in Phase 2.
# Must be done before any dump is defined (LAMMPS restriction).
# NPT iso works fine on triclinic boxes.
change_box all triclinic

# Setup trajectory (captures Phase 1 and Phase 2 for visual inspection)
dump traj_setup all_mobile custom ${dump_freq_setup} &
    traj_files/setup_${dataname}_${interaction}_${nsteps}.lammpstrj &
    id type mol x y z

# Brief energy minimisation to resolve any residual overlaps in the data file
minimize 1.0e-4 1.0e-6 500 5000

fix npt_equil all_mobile npt temp ${temp_target} ${temp_target} 1.0 &
    iso ${P_target} ${P_target} 10.0
run ${nsteps_equil}
unfix npt_equil

print ">>> Post-equilibration T = $(c_mobile_temp)  P = $(press)"
print ">>> Box after Phase 1: $(lx) x $(ly) x $(lz)"


# ==========================================================================
#                  GEL CHARACTERIZATION (post-equilibration)
# ==========================================================================
# Snapshot gel extent → trim box z.
# Rg tensor → analysis region sizing (consistent with slab_with_flow convention).

compute polymer_com polymer com

# z-extent only (minz/maxz) — used to trim the simulation box
compute minz polymer reduce min z
compute maxz polymer reduce max z

# Radius of gyration tensor: c_rg_tensor[i] = Rg_ii^2 (diagonal)
# For a uniform rectangular prism: L_i = 2*sqrt(3) * sqrt(Rg_ii^2)
compute rg_tensor polymer gyration

variable gel_lx_rg equal 2.0*sqrt(3.0*c_rg_tensor[1])
variable gel_ly_rg equal 2.0*sqrt(3.0*c_rg_tensor[2])
variable gel_lz_rg equal 2.0*sqrt(3.0*c_rg_tensor[3])
variable gel_vol_rg equal v_gel_lx_rg*v_gel_ly_rg*v_gel_lz_rg

run 0   # initialise ALL computes in one pass before snapshotting

# ----- Snapshot gel z-extent as constants (evaluated NOW via $()) -----
variable gel_zlo   equal $(c_minz)
variable gel_zhi   equal $(c_maxz)

# Shrink box z to gel extent + 1σ buffer on each side.
# This ensures exactly one gel per simulation box and makes the xz tilt
# geometrically consistent with the gel thickness.
variable box_zlo equal $(v_gel_zlo - 1.0)
variable box_zhi equal $(v_gel_zhi + 1.0)
change_box all z final ${box_zlo} ${box_zhi} remap
print ">>> Box z resized to gel extent: ${box_zlo} to ${box_zhi}  (lz = $(lz))"

print ">>> Gel z-extent: ${gel_zlo} to ${gel_zhi}"

# Rg snapshot for analysis region sizing (slab_with_flow convention)
variable Rg_xx equal c_rg_tensor[1]
variable Rg_yy equal c_rg_tensor[2]
variable Rg_zz equal c_rg_tensor[3]

print "Rg  gel: $(v_gel_lx_rg) x $(v_gel_ly_rg) x $(v_gel_lz_rg)"

variable eps equal 1.0e-12
variable hw_x equal v_region_frac*v_rg_scale*sqrt(v_Rg_xx + v_eps)
variable hw_y equal v_region_frac*v_rg_scale*sqrt(v_Rg_yy + v_eps)
variable hw_z equal v_region_frac*v_rg_scale*sqrt(v_Rg_zz + v_eps)

# Initial gel thickness (Rg-based z) — stored as constant for shear strain tracking
# γ = xz_tilt / gel_lz_initial  (computed in analysis notebook from shear_strain_*.dat)
variable gel_lz_initial equal $(v_gel_lz_rg)
print ">>> Initial gel thickness (Rg): ${gel_lz_initial}"

# ----- Gradient velocity shear groups -----
# Gradient zone: top/bottom shear_frac of gel — ALL polymer (backbone + crosslinkers).
#   Including crosslinkers prevents FENE stress at backbone-crosslinker bonds in gradient.
# Tracking zone: outermost track_frac — backbone only for COM tracking.
#   At ~1% depth, tracking atoms have prescribed v ≈ (1 - track_frac/shear_frac/2)×vshear
#   so gel_strain_cm ≈ 0.998 × target at end of Phase 2.
# Interior: all atoms NOT in gradient polymer — interior polymer + all solvent.

variable shear_frac    equal 0.30    # gradient spans 30% of gel from each end (leaves 40% interior)
variable track_frac    equal 0.01    # outermost 1% for COM strain tracking
variable gel_thick     equal $(v_gel_zhi - v_gel_zlo)

# Gradient z-bounds (snapshotted as constants — gel_zhi/gel_zlo are already constants)
variable grad_top_zlo  equal $(v_gel_zhi - v_shear_frac * v_gel_thick)
variable grad_bot_zhi  equal $(v_gel_zlo + v_shear_frac * v_gel_thick)
variable grad_thick    equal $(v_shear_frac * v_gel_thick)

# COM tracking z-bounds (outermost 1%, well inside the gradient zone)
variable top_track_zlo equal $(v_gel_zhi - v_track_frac * v_gel_thick)
variable bot_track_zhi equal $(v_gel_zlo + v_track_frac * v_gel_thick)

print ">>> gel_thick: ${gel_thick}  grad_thick: ${grad_thick}"
print ">>> Gradient: z_inner_top = ${grad_top_zlo}  z_inner_bot = ${grad_bot_zhi}"

region reg_grad_top  block EDGE EDGE EDGE EDGE ${grad_top_zlo}  ${gel_zhi}      units box
region reg_grad_bot  block EDGE EDGE EDGE EDGE ${gel_zlo}       ${grad_bot_zhi} units box
region reg_track_top block EDGE EDGE EDGE EDGE ${top_track_zlo} ${gel_zhi}      units box
region reg_track_bot block EDGE EDGE EDGE EDGE ${gel_zlo}       ${bot_track_zhi} units box

group grad_top_all   region reg_grad_top
group grad_bot_all   region reg_grad_bot
group track_top_all  region reg_track_top
group track_bot_all  region reg_track_bot

# Gradient groups — all polymer types in the gradient zones
group poly_top_grad intersect polymer grad_top_all
group poly_bot_grad intersect polymer grad_bot_all

# COM tracking groups — backbone only in outermost 1% (near full vshear)
group poly_top_s intersect backbone track_top_all
group poly_bot_s intersect backbone track_bot_all

# Interior: everything NOT in gradient polymer groups (interior polymer, crosslinkers, solvent)
group interior_mobile subtract all_mobile poly_top_grad poly_bot_grad

compute xcm_top poly_top_s com
compute xcm_bot poly_bot_s com

run 0   # force xcm compute initialization before snapshotting

# Snapshot x-COM separation as a constant (reference state before shear)
variable xcm_sep_0    equal $(c_xcm_top[1] - c_xcm_bot[1])

# Live gel strain from COM of outermost tracking layers.
# These atoms are driven at ≈ vshear (v_prescribed ≈ 0.998×vshear for track_frac=0.01,
# shear_frac=0.30), so gel_strain_cm ≈ 0.998 × target_strain_xz at Phase 2 end.
# Use the MEASURED gel_strain_cm as γ for G = ⟨σ_p_xz⟩ / γ — more accurate than target.
variable gel_strain_cm equal (c_xcm_top[1] - c_xcm_bot[1] - v_xcm_sep_0) / v_gel_thick

print ">>> xcm_sep_0 (x-COM top-bot, t=0): ${xcm_sep_0}"
print ">>> poly_top_grad: $(count(poly_top_grad))  poly_bot_grad: $(count(poly_bot_grad))"
print ">>> poly_top_s (tracking 1%): $(count(poly_top_s))  poly_bot_s: $(count(poly_bot_s))"
print ">>> interior_mobile: $(count(interior_mobile))"

# ----- Shear velocity -----
# Top surface (z=gel_zhi) moves at +vshear, bottom (z=gel_zlo) at -vshear.
# Chosen so relative surface displacement at end of Phase 2 = target_strain_xz × gel_thick.
#   2 × vshear × nsteps_shear × dt = target_strain_xz × gel_thick
# Velocity discontinuity at gradient/interior boundary:
#   Δv ≈ vshear × Δz_bond / grad_thick ≈ vshear × 0.97 / grad_thick  (per bond in gradient)
#   For shear_frac=0.30, grad_thick≈0.30×gel_thick → Δv/vshear ≈ 0.25 per bond.
#   Innermost gradient atom: v_prescribed ≈ vshear × Δz_first_atom / grad_thick ≈ 0.06×vshear.
#   NVT interior atom sees only this tiny discontinuity — no monotonic FENE stretching.
variable vshear     equal $(v_target_strain_xz * v_gel_thick / (2.0 * v_nsteps_shear * v_timestep_prod))
variable neg_vshear equal -v_vshear
print ">>> vshear = ${vshear} σ/τ  (total surface displacement = $(v_vshear*v_nsteps_shear*v_timestep_prod) σ)"

# Per-atom gradient velocity profiles (atom-style variables):
#   Top:    v(z) = +vshear × (z − grad_top_zlo) / grad_thick
#           → 0 at inner boundary (z = grad_top_zlo), +vshear at surface (z = gel_zhi)
#   Bottom: v(z) = −vshear × (grad_bot_zhi − z) / grad_thick
#           → 0 at inner boundary (z = grad_bot_zhi), −vshear at surface (z = gel_zlo)
# NOTE: fix move variable argument order is: x y z vx vy vz
#   Use NULL NULL NULL v_vx_top_grad NULL NULL to prescribe x-velocity only.
#   (Passing velocity as arg 1 prescribes x-position — a prior bug that caused gel_strain_cm≈0.)
variable vx_top_grad atom "v_vshear * (z - v_grad_top_zlo) / v_grad_thick"
variable vx_bot_grad atom "v_neg_vshear * (v_grad_bot_zhi - z) / v_grad_thick"


# ==========================================================================
#              PHASE 2: SHEAR APPLICATION (gradient fix move)
# ==========================================================================
# Gradient velocity profile driven on top/bottom 30% of gel polymer.
# Box stays ORTHOGONAL (xz = 0).
#
# FENE safety analysis:
#   Within gradient zone: adjacent bonded atoms both have prescribed velocities
#   that differ by only Δv ≈ vshear × Δz/grad_thick — no stretching within gradient.
#   At gradient/interior boundary: innermost gradient atom has v ≈ 0.06×vshear;
#   NVT interior neighbor sees this tiny excess → thermostat accommodates without
#   bond growth.  No monotonic stretching anywhere.
#
# gel_strain_cm tracks COM of outermost 1% (≈ 0.998×vshear) → rises monotonically.
# G in Phase 3: ⟨σ_p_xz⟩ / gel_strain_cm_final

print "========================================"
print "Phase 2: Gradient fix move variable (${nsteps_shear} steps)"
print "  Gradient: top/bot ${shear_frac} of gel  |  vshear = ${vshear} σ/τ"
print "  v(z) = vshear × (z − z_inner) / grad_thick  [continuous linear ramp]"
print "  Expected gel_strain_cm at end: ≈ ${target_strain_xz}"
print "========================================"

fix nvt_shear      interior_mobile nvt temp ${temp_target} ${temp_target} 1.0
fix mom_shear      interior_mobile momentum 100 linear 1 1 1 angular
# fix move variable arg order: x y z vx vy vz  (NULL = not prescribed)
# Prescribe only vx (arg 4); leave x, y, z, vy, vz as NULL.
fix move_top_grad  poly_top_grad move variable NULL NULL NULL v_vx_top_grad NULL NULL
fix move_bot_grad  poly_bot_grad move variable NULL NULL NULL v_vx_bot_grad NULL NULL

# Columns: step  gel_lz_initial  gel_thick  gel_strain_cm
# gel_strain_cm should rise monotonically from 0 → ≈target_strain_xz.
fix out_shear_strain all print ${stress_freq} &
    "$(step) ${gel_lz_initial} ${gel_thick} $(v_gel_strain_cm)" &
    file output_files/stress_data/shear_strain_${dataname}_${interaction}_${nsteps}.dat screen no

run ${nsteps_shear}

unfix out_shear_strain
unfix move_bot_grad
unfix move_top_grad
unfix mom_shear
unfix nvt_shear
undump traj_setup

print ">>> Phase 2 complete"
print ">>>   gel_strain_cm = $(v_gel_strain_cm)  (target: ${target_strain_xz})"
print ">>>   G = <sigma_p_xz> / $(v_gel_strain_cm)"
print ">>> Post-shear gel (Rg): $(v_gel_lx_rg) x $(v_gel_ly_rg) x $(v_gel_lz_rg)"

# Freeze Rg-based region half-widths as constants (gel geometry now fixed)
variable hw_x equal $(v_hw_x)
variable hw_y equal $(v_hw_y)
variable hw_z equal $(v_hw_z)

print ">>> hw_x=${hw_x}  hw_y=${hw_y}  hw_z=${hw_z}"


# ==========================================================================
#                    ANALYSIS: PARTIAL STRESSES
# ==========================================================================
# stress/atom gives per-atom virial in units of [pressure × volume].
# Two output forms:
#   (a) Box-integrated 6-component tensor: sum over all atoms / total volume
#       → directly comparable to thermo bulk pressure (pxx pyy pzz pxy pxz pyz)
#   (b) z-binned 6-component profile: per-atom virial / bin_volume, summed per bin
#       → local stress as a function of z position

compute stress_polymer polymer stress/atom NULL
compute stress_solvent  solvent  stress/atom NULL

# ----- (a) Box-integrated polymer stress tensor -----
compute sig_p_xx polymer reduce sum c_stress_polymer[1]
compute sig_p_yy polymer reduce sum c_stress_polymer[2]
compute sig_p_zz polymer reduce sum c_stress_polymer[3]
compute sig_p_xy polymer reduce sum c_stress_polymer[4]
compute sig_p_xz polymer reduce sum c_stress_polymer[5]
compute sig_p_yz polymer reduce sum c_stress_polymer[6]

variable stress_p_xx equal c_sig_p_xx/vol
variable stress_p_yy equal c_sig_p_yy/vol
variable stress_p_zz equal c_sig_p_zz/vol
variable stress_p_xy equal c_sig_p_xy/vol
variable stress_p_xz equal c_sig_p_xz/vol
variable stress_p_yz equal c_sig_p_yz/vol

# ----- (a) Box-integrated solvent stress tensor -----
compute sig_s_xx solvent reduce sum c_stress_solvent[1]
compute sig_s_yy solvent reduce sum c_stress_solvent[2]
compute sig_s_zz solvent reduce sum c_stress_solvent[3]
compute sig_s_xy solvent reduce sum c_stress_solvent[4]
compute sig_s_xz solvent reduce sum c_stress_solvent[5]
compute sig_s_yz solvent reduce sum c_stress_solvent[6]

variable stress_s_xx equal c_sig_s_xx/vol
variable stress_s_yy equal c_sig_s_yy/vol
variable stress_s_zz equal c_sig_s_zz/vol
variable stress_s_xy equal c_sig_s_xy/vol
variable stress_s_xz equal c_sig_s_xz/vol
variable stress_s_yz equal c_sig_s_yz/vol

# ----- (b) Per-atom z-bin stress variables (pre-divided by bin volume lx*ly*binWidth) -----
# Summed over each z-bin by fix ave/chunk (norm none) → local stress per bin volume
variable s_p_xx atom c_stress_polymer[1]/(lx*ly*${binWidth})
variable s_p_yy atom c_stress_polymer[2]/(lx*ly*${binWidth})
variable s_p_zz atom c_stress_polymer[3]/(lx*ly*${binWidth})
variable s_p_xy atom c_stress_polymer[4]/(lx*ly*${binWidth})
variable s_p_xz atom c_stress_polymer[5]/(lx*ly*${binWidth})
variable s_p_yz atom c_stress_polymer[6]/(lx*ly*${binWidth})

variable s_s_xx atom c_stress_solvent[1]/(lx*ly*${binWidth})
variable s_s_yy atom c_stress_solvent[2]/(lx*ly*${binWidth})
variable s_s_zz atom c_stress_solvent[3]/(lx*ly*${binWidth})
variable s_s_xy atom c_stress_solvent[4]/(lx*ly*${binWidth})
variable s_s_xz atom c_stress_solvent[5]/(lx*ly*${binWidth})
variable s_s_yz atom c_stress_solvent[6]/(lx*ly*${binWidth})


# ==========================================================================
#                    ANALYSIS: SPATIAL CHUNKS (z-binning)
# ==========================================================================

# Full-box z-binning (no lateral region restriction — full gel profile)
# Triclinic boxes require units reduced (fractional coords, 0–1).
# Snapshot binWidth as a fraction of lz NOW (lz is fixed post-Phase 2).
# Physical bin thickness = binWidth_reduced × lz = binWidth, so per-atom
# normalisation (÷ lx·ly·binWidth) in the stress variables remains correct.
variable binWidth_reduced equal $(v_binWidth/lz)
compute chunk_z_polymer polymer chunk/atom bin/1d z lower ${binWidth_reduced} units reduced
compute chunk_z_solvent  solvent  chunk/atom bin/1d z lower ${binWidth_reduced} units reduced


# ==========================================================================
#              PHASE 3: NVT PRODUCTION (Frozen Gradient Boundary)
# ==========================================================================
# All 10 sub-layer groups (pt1-pt5, pb1-pb5) frozen at Phase 2 final x-positions
# via fix move linear 0 0 0 (velocity = 0 each step → atoms held in place).
# Interior polymer + solvent (interior_mobile) equilibrate freely under NVT.
# Stress relaxes to equilibrium → G = ⟨σ_p_xz⟩ / gel_strain_cm_final.
#
# FENE safety in Phase 3:
#   Frozen atoms have v=0; interior atoms can move freely in response to FENE forces.
#   Interior atom bonded to frozen atom: FENE force pulls it toward frozen atom,
#   interior atom responds freely → bond reaches mechanical equilibrium.
#   No monotonic growth (unlike Phase 2 hard fix move where driven atom is
#   continuously being reset — frozen atom does not move, just resists).
#
# compute stress/atom NULL uses virial (forces), not velocities.
# Frozen atoms' bond forces ARE included in the virial sum → correct σ_p_xz.
#
# fix mom_zero angular:
#   Removes any residual angular momentum from Phase 2 drive every 100 steps.
#   Applied to interior_mobile only (gradient zone is frozen, angular not relevant).

print "========================================"
print "Phase 3: NVT production (${nsteps} steps)"
print "  Gradient zones frozen at Phase 2 final positions"
print "  gel_strain_cm = $(v_gel_strain_cm)  (= γ for G calculation)"
print "  G = <sigma_p_xz> / $(v_gel_strain_cm)"
print "========================================"

fix hold_top  poly_top_grad   move linear 0 0 0   # freeze top gradient zone
fix hold_bot  poly_bot_grad   move linear 0 0 0   # freeze bottom gradient zone
fix nvt_prod  interior_mobile nvt temp ${temp_target} ${temp_target} 1.0
fix mom_zero  interior_mobile momentum 100 linear 1 1 1 angular

# Production trajectory — sparse, all mobile atoms (for volume fraction extraction)
dump traj_prod all_mobile custom ${dump_freq_prod} &
    traj_files/prod_${dataname}_${interaction}_${nsteps}.lammpstrj &
    id type mol x y z


# ==========================================================================
#    OUTPUT: BOX-INTEGRATED STRESS TENSOR (time-averaged scalars)
# ==========================================================================
# Columns: step  sigma_xx  sigma_yy  sigma_zz  sigma_xy  sigma_xz  sigma_yz
# KEY OUTPUT for G: sigma_xz / shear_strain_current → shear modulus G

fix avg_stress_polymer all ave/time ${nevery_stress} ${nrepeat_stress} ${nfreq_stress} &
    v_stress_p_xx v_stress_p_yy v_stress_p_zz &
    v_stress_p_xy v_stress_p_xz v_stress_p_yz &
    file output_files/stress_data/stress_tensor_polymer_${dataname}_${interaction}_${nsteps}.dat

fix avg_stress_solvent all ave/time ${nevery_stress} ${nrepeat_stress} ${nfreq_stress} &
    v_stress_s_xx v_stress_s_yy v_stress_s_zz &
    v_stress_s_xy v_stress_s_xz v_stress_s_yz &
    file output_files/stress_data/stress_tensor_solvent_${dataname}_${interaction}_${nsteps}.dat


# ==========================================================================
#    OUTPUT: Z-PROFILE STRESS TENSOR (time-averaged per z-bin)
# ==========================================================================
# fix ave/chunk with norm none: sums pre-normalized per-atom virial over each bin,
# then time-averages → local stress component in that z-slice.
# File columns: chunk_id  z_coord  count  s_xx  s_yy  s_zz  s_xy  s_xz  s_yz

fix prof_z_polymer polymer ave/chunk ${nevery_stress} ${nrepeat_stress} ${nfreq_stress} &
    chunk_z_polymer &
    v_s_p_xx v_s_p_yy v_s_p_zz v_s_p_xy v_s_p_xz v_s_p_yz &
    norm none &
    file output_files/stress_data/stress_profile_z_polymer_${dataname}_${interaction}_${nsteps}.dat

fix prof_z_solvent solvent ave/chunk ${nevery_stress} ${nrepeat_stress} ${nfreq_stress} &
    chunk_z_solvent &
    v_s_s_xx v_s_s_yy v_s_s_zz v_s_s_xy v_s_s_xz v_s_s_yz &
    norm none &
    file output_files/stress_data/stress_profile_z_solvent_${dataname}_${interaction}_${nsteps}.dat


# ==========================================================================
#    OUTPUT: GEL AND BOX DIMENSIONS
# ==========================================================================

# Gel dimensions — Rg-based (robust estimate; matches slab_with_flow convention)
fix out_gel_dims_rg all print ${stress_freq} &
    "$(step) $(v_gel_lx_rg) $(v_gel_ly_rg) $(v_gel_lz_rg)" &
    file output_files/volume_data/gel_dimensions_rg_${dataname}_${interaction}_${nsteps}.dat screen no

# Box dimensions including tilt factors (xy, xz, yz) — xz should be constant in Phase 3
fix out_box_dims all print ${stress_freq} &
    "$(step) $(lx) $(ly) $(lz) $(xy) $(xz) $(yz)" &
    file output_files/volume_data/box_dimensions_${dataname}_${interaction}_${nsteps}.dat screen no

# Polymer centre of mass
fix out_polymer_com all print ${stress_freq} &
    "$(step) $(c_polymer_com[1]) $(c_polymer_com[2]) $(c_polymer_com[3])" &
    file output_files/volume_data/polymer_com_${dataname}_${interaction}_${nsteps}.dat screen no


# ==========================================================================
#                         PRODUCTION RUN
# ==========================================================================

run ${nsteps}


# ==========================================================================
#                            CLEANUP
# ==========================================================================

undump traj_prod
unfix mom_zero
unfix nvt_prod
unfix hold_bot
unfix hold_top

print "========================================"
print "Shear slab simulation complete"
print "  gel_strain_cm (γ for G): $(v_gel_strain_cm)  (target: ${target_strain_xz})"
print "  gel_lz_initial: ${gel_lz_initial}  gel_thick: ${gel_thick}"
print "  Final box: $(lx) x $(ly) x $(lz)  xz = $(xz)  (orthogonal: xz should be 0)"
print "========================================"

variable outfile string "final_shear_${dataname}_${interaction}_${nsteps}"
write_data ${outfile}.data
