# ========== Slab equilibrating in solvent WITH SUPPORT ==========
# Variables loaded via bash script:
# - dataname: name of data file
# - interaction: epsSS_epsSP
# - nsteps: production run steps
# - oldsteps: previous timesteps (for restart)
# - totsteps: total cumulative timesteps
# - epsSS: solvent-solvent interaction strength
# - epsSP: solvent-polymer interaction strength

# Reduced LJ units: tau = sigma*sqrt(m/epsilon)
# (sigma = 1, m = 1, epsilon = 1.5)
# dt = 0.005 → 1e6 steps ≈ 4.1e3 tau


# ========== Simulation Parameters ==========
variable sigma equal 1.0
variable binWidth equal 2

# Time averaging parameters
# Stress sampled as a single instantaneous snapshot every nfreq_avg_stress
# steps (nrepeat=1) — not time-averaged over an inner window — since it's
# only used for eyeballing convergence, not a precise mean. This keeps the
# (relatively expensive) per-atom stress/atom compute off the hot path:
# it only runs once every nfreq_avg_stress steps instead of every nevery.
variable nevery_avg_stress equal 50000
variable nrepeat_avg_stress equal 1
variable nfreq_avg_stress equal 50000

# Output frequencies
variable thermo_freq equal 100000
variable dump_freq equal 100000
variable volume_freq equal 10000

# ----- Continuation flag -----
# 0 = fresh start (default)  1 = continuation from a final .data file
# When cont=1 the push-off, minimization, gentle NVT thermalization, and NPT
# warm-up are all skipped — the data file already holds an equilibrated config.
variable cont       index 0

# Equilibration parameters
variable temp_target equal 1.0
variable press_target index 1.5 # APPROPRIATE VALUE IMPORTANT — overridden by -var on command line
variable vel_seed     index 12345  # RNG seed for create_velocity; overridden by -var for replica sweeps
variable tdamp equal 1.0
variable pdamp equal 5.0   # ~1000*dt (dt=0.005); looser than 1.0 to avoid barostat ringing during swelling
variable timestep_gentle equal 0.001
variable timestep_prod equal 0.005
variable nsteps_gentle equal 5000


# ========== Initialization ==========
units lj
dimension 3
boundary p p p
atom_style molecular
atom_modify map array

# Read initial data or restart
variable is_restart equal is_file(restart_${dataname}_${interaction}_${oldsteps}.restart)
variable restartFlag string file

# Force fresh start if oldsteps is 0
if "${oldsteps} == 0" then &
    "variable is_restart equal 0"

if "${is_restart} == 1" then &
    "read_restart restart_${dataname}_${interaction}_${oldsteps}.restart" &
else &
    "read_data data_files/${dataname}.data"

if "${is_restart} == 1" then &
    "variable restartFlag string append"


print ">>> is_restart = ${is_restart}"
print ">>> Previous    # of timesteps: ${oldsteps}"
print ">>> Current     # of timesteps: ${nsteps}"
print ">>> Cumulative  # of timesteps: ${totsteps}"

comm_modify cutoff 5.0


# ========== Group Definitions ==========
group polymer type 1 2
group solvent type 3
group support type 4
group piston type 5
group mobile type 1 2 3
group polymer_and_support type 1 2 4 5


# =====================================================================
#   PHASE 0 (fresh start only): SOFT PUSH-OFF
# =====================================================================
# Harmonic bonds pull beads to r₀ = 0.96σ without any divergence
# Soft pairs prevent pair overlaps with finite, bounded forces

if "${is_restart} == 0 && ${cont} == 0" then &
    "pair_style soft 1.122"              &
    "pair_coeff * * 50.0"              &
    "pair_coeff 4 4 0.0"              &
    "pair_coeff 5 5 0.0"              &
    "pair_coeff 4 5 0.0"              &
    "bond_style harmonic"              &
    "bond_coeff * 200.0 0.96"         &
    "special_bonds lj 0 1 1"

# Freeze support and piston during push-off
velocity support set 0.0 0.0 0.0
fix freeze_support support setforce 0.0 0.0 0.0
velocity piston set 0.0 0.0 0.0
fix freeze_piston piston setforce 0.0 0.0 0.0

# Thermo output for monitoring push-off
thermo_style custom step temp pe ke etotal press vol lx ly lz
thermo 1000

if "${is_restart} == 0 && ${cont} == 0" then &
    "velocity mobile create 0.01 ${vel_seed} mom yes rot no"   &
    "fix pushoff mobile nve/limit 0.05"                          &
    "fix lang_pushoff mobile langevin 0.01 0.01 ${tdamp} 904297" &
    "timestep ${timestep_gentle}"                        &
    "run 10000"                                          &
    "unfix pushoff"                                      &
    "unfix lang_pushoff"

# After push-off, bonds should be near 0.96σ. Check with thermo PE:
# PE should have dropped from ~10^19 to ~10^3 or lower.


# =====================================================================
#   PHASE 1: SWITCH TO PRODUCTION POTENTIALS
# =====================================================================
# Redefine pair and bond styles. This is required for both fresh and
# restart paths — on restart, read_restart restores styles, but we
# redefine them here for clarity and safety.

pair_style lj/cut 1.122                  # WAS 2.5
pair_coeff * * 1.0 ${sigma} 1.122        # WAS 2.5
pair_coeff 1 3 ${epsSP} ${sigma} 1.122 # WAS 2.5   # polymer-solvent
pair_coeff 2 3 ${epsSP} ${sigma} 1.122 # WAS 2.5   # crosslinker-solvent
pair_coeff 3 3 ${epsSS} ${sigma} 1.122 # WAS 2.5   # solvent-solvent
pair_coeff 1 4 1.0 ${sigma} 1.122       # polymer-support (WCA)
pair_coeff 2 4 1.0 ${sigma} 1.122       # crosslinker-support (WCA)
pair_coeff 3 4 0.0 ${sigma} 0.0        # solvent-support (off)
pair_coeff 4 4 0.0 ${sigma} 0.0        # support-support (off)
pair_coeff 1 5 1.0 ${sigma} 1.122       # polymer-piston (WCA)
pair_coeff 2 5 1.0 ${sigma} 1.122       # crosslinker-piston (WCA)
pair_coeff 3 5 1.0 ${sigma} 1.122       # solvent-piston (WCA)
pair_coeff 4 5 1.0 ${sigma} 1.122      # support-piston (WCA backstop): if the
                                       #   piston floats up through the top z-PBC
                                       #   it re-enters below the support and is
                                       #   stopped at contact instead of passing
                                       #   through into the gel from below.
pair_coeff 5 5 0.0 ${sigma} 0.0        # piston-piston (off)

bond_style fene
bond_coeff * 30.0 1.5 1.0 1.0
special_bonds fene

# Neighbor list exclusions
neigh_modify exclude type 4 4   # support-support
neigh_modify exclude type 5 5   # piston-piston
# neigh_modify exclude type 4 5   # support-piston: EXCLUSION REMOVED so the
#   WCA backstop above (pair_coeff 4 5) is actually computed. Re-add this line
#   (and reset pair_coeff 4 5 to 0.0) to restore pass-through behavior.

# Angle style (uncomment if angles present in data file)
#angle_style hybrid cosine harmonic
#angle_coeff 1 cosine 1.0
#angle_coeff 2 harmonic 40.0 109.47


# =====================================================================
#   PHASE 2: ENERGY MINIMIZATION
# =====================================================================
# Now safe — bonds are near 0.96σ (after push-off) or at equilibrium
# (after restart). Piston/support still frozen via setforce.

if "${is_restart} == 0 && ${cont} == 0" then &
    "minimize 1.0e-4 1.0e-6 10000 100000"

# Release piston: free to fluctuate in z, frozen and PERIODIC in x/y.
# NOTE: do NOT use `fix rigid` here — the piston sheet now spans the entire
# periodic box in x and y, and a rigid body wider than half the box is
# mis-reconstructed by rigid's nearest-image unwrapping. Instead:
#   - setforce 0 0 NULL  : zero x/y forces so the sheet can't drift laterally
#                          (it stays tiled and periodic with the box)
#   - aveforce NULL NULL 0.0 : give every piston atom the SAME z-force (the
#                          group average), so the plate translates uniformly in
#                          z and stays flat as solvent equilibrates around it
#   - nve                : integrate the piston (mobile group / npt does not)
# This is periodic-safe and frictionless; the box-expansion coupling is a
# separate issue (dilate/aniso-z) handled elsewhere.
unfix freeze_piston
fix piston_xy  piston setforce 0.0 0.0 NULL
fix piston_z   piston aveforce NULL NULL 0.0
fix piston_nve piston nve


# =====================================================================
#   THERMO OUTPUT
# =====================================================================
thermo_style custom step temp pe ke etotal press vol lx ly lz
thermo ${thermo_freq}

# Trajectory output
dump poly_traj polymer_and_support custom ${dump_freq} traj_files/polymer_${dataname}_${interaction}_${totsteps}.lammpstrj id type mol x y z

# =====================================================================
#   PHASE 3: GENTLE NVT THERMALIZATION
# =====================================================================
if "${is_restart} == 0 && ${cont} == 0" then "reset_timestep 0"
if "${is_restart} == 0 && ${cont} == 0" then "velocity mobile create 0.01 ${vel_seed} mom yes rot no"
if "${is_restart} == 0 && ${cont} == 0" then "fix 1 mobile nve/limit 0.05"
if "${is_restart} == 0 && ${cont} == 0" then "fix 2 mobile langevin 0.01 ${temp_target} ${tdamp} 904297"
if "${is_restart} == 0 && ${cont} == 0" then "timestep ${timestep_gentle}"
if "${is_restart} == 0 && ${cont} == 0" then "run ${nsteps_gentle}"
if "${is_restart} == 0 && ${cont} == 0" then "unfix 1"
if "${is_restart} == 0 && ${cont} == 0" then "unfix 2"


# ========== Gel Volume Calculations ==========
# Method 1: Bounding box
compute minx polymer reduce min x
compute maxx polymer reduce max x
compute miny polymer reduce min y
compute maxy polymer reduce max y
compute minz polymer reduce min z
compute maxz polymer reduce max z

variable gel_lx equal c_maxx-c_minx
variable gel_ly equal c_maxy-c_miny
variable gel_lz equal c_maxz-c_minz
variable gel_vol_box equal v_gel_lx*v_gel_ly*v_gel_lz

# Method 2: Radius of gyration
compute rg_polymer polymer gyration
variable rg_cubed equal c_rg_polymer^3


# ========== Polymer Stress Tensor ==========
# Off-diagonal/diagonal ratio (see plot_lammps_log.py::plot_swelling_anisotropy)
# diagnoses how much the periodic images squeeze the gel and prevent
# isotropic expansion during equilibration.
compute stress_poly polymer stress/atom NULL
compute sig_p_xx polymer reduce sum c_stress_poly[1]
compute sig_p_yy polymer reduce sum c_stress_poly[2]
compute sig_p_zz polymer reduce sum c_stress_poly[3]
compute sig_p_xy polymer reduce sum c_stress_poly[4]
compute sig_p_xz polymer reduce sum c_stress_poly[5]
compute sig_p_yz polymer reduce sum c_stress_poly[6]

variable stress_p_xx equal c_sig_p_xx/v_gel_vol_box
variable stress_p_yy equal c_sig_p_yy/v_gel_vol_box
variable stress_p_zz equal c_sig_p_zz/v_gel_vol_box
variable stress_p_xy equal c_sig_p_xy/v_gel_vol_box
variable stress_p_xz equal c_sig_p_xz/v_gel_vol_box
variable stress_p_yz equal c_sig_p_yz/v_gel_vol_box


# ========== Box Dimensions ==========
variable box_lx equal lx
variable box_ly equal ly
variable box_lz equal lz


# ========== NPT Equilibration ==========
#if "${is_restart} == 0" then "reset_timestep 0"
# aniso: barostat x, y, z INDEPENDENTLY to press_target (σxx=σyy=σzz=P), box
# aspect ratio free. This is the free-swelling-in-a-bath analogue — each face is
# held at the bath pressure with no imposed coupling, so the gel relaxes to its
# own equilibrium shape instead of being locked to the data file's tall aspect
# ratio (which is what `iso` did: it controls only the mean pressure and freezes
# the aspect ratio, so the inherited z-swelling / z-padding never relaxes).
# Cell stays orthogonal (no tilt) — use `tri` only if a real shear stress must relax.
fix 1 mobile npt temp ${temp_target} ${temp_target} ${tdamp} aniso ${press_target} ${press_target} ${pdamp} # dilate mobile fixedpoint $(lx/2) $(ly/2) 0
timestep ${timestep_prod}
if "${is_restart} == 0 && ${cont} == 0" then "run ${nsteps_gentle}"


# ========== Production Run with Time Averaging ==========

# Volume and dimension output
fix gel_vol_bb_output all print ${volume_freq} "${gel_vol_box}" &
    ${restartFlag} output_files/volume_data/gel_volume_bb_${dataname}_${interaction}_${totsteps}.dat screen no

fix gel_vol_rg_output all print ${volume_freq} "$(step) ${rg_cubed}" &
    ${restartFlag} output_files/volume_data/gel_volume_rg_${dataname}_${interaction}_${totsteps}.dat screen no

fix gel_dims_output all print ${volume_freq} "$(step) ${gel_lx} ${gel_ly} ${gel_lz}" &
    ${restartFlag} output_files/volume_data/gel_dimensions_${dataname}_${interaction}_${totsteps}.dat screen no

fix box_dims_output all print ${volume_freq} "$(step) ${box_lx} ${box_ly} ${box_lz}" &
    ${restartFlag} output_files/volume_data/box_dimensions_${dataname}_${interaction}_${totsteps}.dat screen no

fix avg_stress_polymer all ave/time ${nevery_avg_stress} ${nrepeat_avg_stress} ${nfreq_avg_stress} &
    v_stress_p_xx v_stress_p_yy v_stress_p_zz &
    v_stress_p_xy v_stress_p_xz v_stress_p_yz &
    ${restartFlag} output_files/stress_data/stress_tensor_polymer_${dataname}_${interaction}_${totsteps}.dat


# Production run — split into n_snaps sequential blocks; write a data snapshot after each.
# Snapshot files: final_config_${dataname}_${interaction}_${totsteps}_snap<N>.data
# volmix_sweep isolates each snapshot independently so ΔV_mix error bars capture
# both snapshot-to-snapshot composition variance AND thermal (NPT-replica) variance.
variable n_snaps        index 3   # snapshots per run; override with -var n_snaps N
variable steps_per_snap equal round(${nsteps}/${n_snaps})

if "${cont} == 1" then "print '>>> Continuing after ${oldsteps} timesteps'"
fix remove_drift mobile momentum 1000 linear 1 1 1 angular

variable snap_i loop ${n_snaps}
label snap_loop
    run ${steps_per_snap}
    variable snap_outfile string "final_config_${dataname}_${interaction}_${totsteps}_snap${snap_i}"
    write_data ${snap_outfile}.data
    print ">>> Wrote snapshot ${snap_i}/${n_snaps} at step $(step)"
    next snap_i
    jump SELF snap_loop


# ========== Cleanup ==========
unfix 1
unfix remove_drift
unfix avg_stress_polymer
undump poly_traj


# ========== Save Final Configuration ==========
variable outfile string "final_config_${dataname}_${interaction}_${totsteps}"
write_restart ${outfile}.restart
write_data ${outfile}.data
# (identical to snap${n_snaps}; retained for backward compatibility)
